# Parameter estimation with limited sensor data:
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# Look at the setup above. Assume that the values R1, R2, and R3 are unknown. We have the voltage/current probe PR1 available and we have control over the switches S1 and S2. How can we determine the parameters of the resistors?
# Eulers method:
V := 1 V
R1 := 1 Ω
R2 := 2 Ω
R3 := 3 Ω  # <- Actual values that we are trying to determine)
R4 := (R2^-1 + R3^-1)^-1 = 1.2 Ω  # <- R2 || R3
# Basically Newtons method
# Using three measurements:
# First measurement:
# With S1 open and S2 closed:
I := V/(R1 + R2) = 0.333333 A  # <- What our probe measures
TOT1 := V/I = 3 Ω  # <- Total resistance of measurement 1
# Second measurement:
# With S1 closed and S2 open:
I := V/(R1 + R3) = 0.25 A
TOT2 := V/I = 4 Ω
# Third measurement:
# With S1 open and S2 open:
I := V/(R1 + R4) = 0.454545 A
TOT3 := V/I = 2.2 Ω
# Guess a value for R1:
R1_guess := 0 Ω = 0 Ω  # <- The current guess (Change for each iteration)
R2_guess := TOT1 - R1_guess = 3 Ω  # <- Since EQ1 = R1+R2 in our setup
R3_guess := TOT2 - R1_guess = 4 Ω  # <- Since EQ2 = R1+R3 in our setup
# Find error:
R4_guess := (R2_guess^-1 + R3_guess^-1)^-1 = 1.71429 Ω
TOT3_guess := R1_guess + R4_guess = 1.71429 Ω
Err := TOT3 - TOT3_guess = 0.485714 Ω
R1_new_guess := R1_guess + Err = 0.485714 Ω
# Equation solving:
